# Расчет Обратнаходового преобразователя
# Входные данные:
Uin := 220
Iout := 2
Uin_min := 176
Uout := 12
Uin_max := 310
Freq := 100000
# _______________________________________________________________________
# Расчет входного фильтра :
